# Введите данные для построения графика | Доп параметры
slesh := "/"
day := "03"
month := "02"
year := "2020"
probel := " "
hour := "00"
minute := "00"
second := "00"
dvtch := ":"
# Преобразование введенных параметров в дату
Date := concat(day, slesh, month, slesh, year, probel, hour, dvtch, minute, dvtch, second)
Date = "03/02/2020 00:00:00"
# Парсинг данных из "data.txt/"
# [component: outputs txt]
txt =  # no stored result
# Индексация даты в датасете
z := rows(txt)
searchi(x) :=
    for row ∈ 0 .. z
        for col ∈ 0 .. 22
            return col if txt[row, col] == x
stolb := searchi(Date) = 0
searchi(x) :=
    for row ∈ 0 .. z
        for col ∈ 0 .. 22
            return row if txt[row, col] == x
strok := searchi(Date) = 289
# Матричное представление искомой строки температур
matr_temp := submatrix(txt, strok, strok, stolb + 1, stolb + 21)
# Создание массивов как параметров осей графика
Y := 0, 50 .. 1000 = [0; 50; 100; 150; 200; 250; 300; 350; 400; 450; 500; 550; 600; 650; 700; 750; 800; 850; 900; 950; 1000]
X1real := txt[strok, 22] = -14.14
Xreal := X1real, X1real - 1 .. X1real - 20 = [-14.14; -15.14; -16.14; -17.14; -18.14; -19.14; -20.14; -21.14; -22.14; -23.14; -24.14; -25.14; -26.14; -27.14; -28.14; -29.14; -30.14; -31.14; -32.14; -33.14; -34.14]
A := transpose(matr_temp)[:, 0] = [-14.2; -13.17; -10.69; -8.22; -6.52; -5.77; -5.64; -5.99; -6.46; -6.95; -7.48; -8; -8.52; -8.85; -9.18; -9.4; -9.62; -9.78; -9.93; -10.05; -10.18]
График
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