# Введите данные для построения графика | Доп параметры
slesh := "/"
day := "01"
month := "01"
year := "2019"
probel := " "
hour := "00"
minute := "00"
second := "00"
dvtch := ":"
# Преобразование введенных параметров в дату
Date := concat(day, slesh, month, slesh, year, probel, hour, dvtch, minute, dvtch, second)
Date = "01/01/2019 00:00:00"
# Парсинг данных из "data.txt/"
# [component: outputs txt]
txt =  # no stored result
# Индексация даты в датасете
z := rows(txt)
searchi(x) :=
    for row ∈ 0 .. z
        for col ∈ 0 .. 22
            return col if txt[row, col] == x
stolb := searchi(Date) = 0
searching(x) :=
    for row ∈ 0 .. z
        for col ∈ 0 .. 22
            return row if txt[row, col] == x
strok := searching(Date) = 0
# Матричное представление искомой строки температур
matr_temp := submatrix(txt, strok, strok, stolb + 1, stolb + 21)
# Создание массивов как параметров осей графика
Y := 0, 50 .. 1000 = [0; 50; 100; 150; 200; 250; 300; 350; 400; 450; 500; 550; 600; 650; 700; 750; 800; 850; 900; 950; 1000]
X1real := txt[strok, 22] = -13
Xreal := X1real, X1real - 1 .. X1real - 20 = [-13; -14; -15; -16; -17; -18; -19; -20; -21; -22; -23; -24; -25; -26; -27; -28; -29; -30; -31; -32; -33]
A := transpose(matr_temp)[:, 0] = [-12.97; -12.62; -12.86; -13.26; -13.61; -13.87; -14.07; -14.12; -14.18; -14.29; -14.38; -14.32; -14.26; -14.08; -13.9; -13.74; -13.57; -13.47; -13.38; -13.38; -13.38]
График
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