# Введите данные для построения графика | Доп параметры
hour := "00"
slesh := "/"
day := "31"
month := "01"
year := "2019"
minute := "00"
probel := " "
second := "00"
dvtch := ":"
# Преобразование введенных параметров в дату
Date := concat(day, slesh, month, slesh, year, probel, hour, dvtch, minute, dvtch, second)
Date = "31/01/2019 00:00:00"
# Парсинг данных из "data.txt/"
# [component: outputs txt]
txt =  # no stored result
# Индексация даты в датасете
z := rows(txt)
searchi(x) :=
    for row ∈ 0 .. z
        for col ∈ 0 .. 22
            return col if txt[row, col] == x
stolb := searchi(Date) = 0
searchi(x) :=
    for row ∈ 0 .. z
        for col ∈ 0 .. 22
            return row if txt[row, col] == x
strok := searchi(Date) = 8641
# Матричное представление искомого диапазона температур
matr_temp := submatrix(txt, strok, strok + 287, stolb + 1, stolb + 21)
matr_temp =  # no stored result
График
# [component: inputs matr_temp]
